OpenVSP model (file version 5), 11 components.
Geometry view with OpenVSP parameter names; values to 6 digits, angles in degrees, lengths in the model's unit.
Overall bounding box: X_Min=-8.04348 X_Len=17.4947 Y_Min=-5.86667 Y_Len=11.7333 Z_Min=-1.39737 Z_Len=4.38988

Wing "Main Wing"
  location (X Y Z) -1.22951 0 0, rotation 0 0 0
  symmetric about XZ
  bounding box size 5.94477 11.3972 0.606795
  totals: TotalSpan=11.4168 TotalProjectedSpan=11.389 TotalChord=3.48958 TotalArea=37.0057 TotalAR=3.50512 MAC=3.46669
  root: chord 5.03125, twist 0, NACA 4-series Camber=0 CamberLoc=0.2 ThickChord=0.06
  sections:
    n  Span     Root_Chord  Tip_Chord  Area     Sweep  Sweep_Location  Dihedral  Twist  Twist_Location  tip airfoil
    1  1.935    5.03125     3.48958    8.24391  35     0               -4        -1     0.25            as above
    2  3.77341  3.48958     1.94792    10.259   35     0               -4        -1     0.25            as above

Wing "LEX", child of "Main Wing"
  location (X Y Z) -4.06985 0 0, rotation 0 0 0
  symmetric about XZ
  bounding box size 12.523 4.43036 0.390354
  totals: TotalSpan=4.43767 TotalProjectedSpan=4.43036 TotalChord=4.99237 TotalArea=30.8611 TotalAR=0.636013 MAC=9.05229
  root: chord 12.523, twist 0, NACA 4-series Camber=0 CamberLoc=0.2 ThickChord=0.03
  sections:
    n  Span      Root_Chord  Tip_Chord  Area      Sweep    Sweep_Location  Dihedral  Twist  Twist_Location  tip airfoil
    1  1.5       12.523      5.49257    13.5117   55       0               -4        0      0.25            as above
    2  0.273303  5.49257     3.10785    1.17526   82.8479  0               0         0      0.25            as above
    3  0.44553   3.10785     0.230397   0.743644  81.3007  0               0         0      0.25            as above

Wing "H Stabs", child of "Main Wing"
  location (X Y Z) 4.67391 0 -0.326087, rotation 0 0 0
  symmetric about XZ
  bounding box size 4.31071 6.22815 0.304532
  totals: TotalSpan=6.2 TotalProjectedSpan=6.19854 TotalChord=1.84167 TotalArea=12.71 TotalAR=3.02296 MAC=2.20344
  root: chord 2.75, twist 0, NACA 4-series Camber=0 CamberLoc=0.2 ThickChord=0.1
  sections:
    n  Span  Root_Chord  Tip_Chord  Area   Sweep    Sweep_Location  Dihedral  Twist  Twist_Location  tip airfoil
    1  1.2   2.75        2.5        3.15   45       0               -2        0      0.25            as above
    2  1.4   2.5         1.4        2.73   50       0               0         0      0.25            as above
    3  0.5   1.4         0.5        0.475  59.1197  0               0         0      0.25            as above

Wing "V Stab", child of "Main Wing"
  location (X Y Z) 4 0 0, rotation 90 0 0
  bounding box size 4.81384 0.350203 2.99252
  totals: TotalSpan=2.92937 TotalProjectedSpan=2.92937 TotalChord=2.08532 TotalArea=6.53296 TotalAR=1.31352 MAC=2.38806
  root: chord 3.5, twist 0, NACA 4-series Camber=0 CamberLoc=0.2 ThickChord=0.1
  sections:
    n  Span     Root_Chord  Tip_Chord  Area      Sweep    Sweep_Location  Dihedral  Twist  Twist_Location  tip airfoil
    1  0.6      3.5         2.71429    1.86429   45       0               0         0      0.25            as above
    2  2.22937  2.71429     1.375      4.55826   51.8571  0               0         0      0.25            as above
    3  0.1      1.375       0.833333   0.110417  51.8571  0               0         0      0.25            as above

Stack "Tip Pylons", child of "Main Wing"
  location (X Y Z) 1.19565 5.75 -0.475, rotation 0 -2 0
  symmetric about XZ
  bounding box size 3.56027 11.6663 0.479981
  cross sections:
    n  XDelta  YDelta  ZDelta  shape
    0  0       0       0       point
    1  1       0       0       rounded rectangle RoundRectXSec_Radius=0.0295455 RoundedRect_Height=0.25 RoundedRect_Width=0.125
    2  2.5     0       0       as above
    3  0.05    0       0       as above

Pod "Wingtip Hardpoints", child of "Main Wing"
  location (X Y Z) 2.5 5.7 -0.4, rotation 0 0 0
  symmetric about XZ
  bounding box size 2.5 11.7333 0.333333
  Design: FineRatio=15 Length=2.5

Stack "Fuselage"
  location (X Y Z) -8.04348 0 -0.543478, rotation 0 0 0
  bounding box size 15.4352 1.37432 1.76503
  cross sections:
    n  XDelta   YDelta  ZDelta     shape
    0  0        0       0          point
    1  1.75     0       0.25       ellipse Ellipse_Height=1 Ellipse_Width=0.886364
    2  4.37705  0       0.25       ellipse Ellipse_Height=1.5 Ellipse_Width=0.886364
    3  5.5082   0       0          ellipse Ellipse_Height=1.5 Ellipse_Width=1.1876
    4  3.8      0       -0.327869  point

Stack "Cockpit", child of "Fuselage"
  location (X Y Z) -2.04918 0 0.5, rotation 0 0 0
  bounding box size 9.34016 0.863001 1.05252
  cross sections:
    n  XDelta   YDelta  ZDelta  shape
    0  0        0       0       point
    1  1.2459   0       0       ellipse Ellipse_Height=0.7 Ellipse_Width=0.85
    2  2.25     0       0       ellipse Ellipse_Height=0.95 Ellipse_Width=0.75
    3  5.34426  0       0       ellipse Ellipse_Height=0.675 Ellipse_Width=0.6
    4  0.5      0       0       point

Stack "Intakes", child of "Fuselage"
  location (X Y Z) 2.07541 0 0, rotation 0 0 0
  bounding box size 7.73561 1.91343 1.71167
  cross sections:
    n  XDelta    YDelta  ZDelta     shape
    0  0         0       0          point
    1  -1.47632  0       -0.647368  circle Circle_Diameter=1.5
    2  1.22105   0       0.142105   as above
    3  3.07959   0       0          general fuselage BotStr=1.78942 BotTanAngle=90 CornerRad=0 Height=0.971591 LowStr=0.83 MaxWidthLoc=0 TopStr=1.07305 TopTanAngle=90 UpStr=0.83 Width=1.82538
    4  3.13115   0       0.35       general fuselage BotStr=1.78942 BotTanAngle=90 CornerRad=0 Height=0.75 LowStr=0.83 MaxWidthLoc=0 TopStr=0.878863 TopTanAngle=90 UpStr=0.83 Width=1.20408
    5  0.05      0       0          point

Stack "Engines", child of "Intakes"
  location (X Y Z) -0.990164 0 0, rotation 0 0 0; relative location -3.06557 0 0, rotation 0 0 0
  bounding box size 10.4414 1.4 1.4
  cross sections:
    n  XDelta    YDelta  ZDelta  shape
    0  0         0       0       circle Circle_Diameter=0.0381679
    1  0.342105  0       0       circle Circle_Diameter=0.486699
    2  1.72526   0       0       circle Circle_Diameter=0.885687
    3  1.19895   0       0       circle Circle_Diameter=0.843511
    4  5.6       0       0       circle Circle_Diameter=1.4
    5  1.4       0       0       circle Circle_Diameter=1.05
    6  0.014     0       0       point

Stack "Canopy Glass", child of "Fuselage"
  location (X Y Z) -5.36393 0 0.2, rotation 0 0 0
  bounding box size 5.2377 0.8 1.3
  cross sections:
    n  XDelta  YDelta  ZDelta      shape
    0  0       0       0           point
    1  1.7377  0       0.163934    ellipse Ellipse_Height=1.3 Ellipse_Width=0.8
    2  2       0       -0.0819672  ellipse Ellipse_Height=1 Ellipse_Width=0.4
    3  1       0       -0.0819672  ellipse Ellipse_Height=0.8 Ellipse_Width=0.4
    4  0.5     0       0           point
