OpenVSP model (file version 5), 12 components.
Geometry view with OpenVSP parameter names; values to 6 digits, angles in degrees, lengths in the model's unit.
Overall bounding box: X_Min=-12.676 X_Len=49.9293 Y_Min=-5.86667 Y_Len=11.7333 Z_Min=-1.39737 Z_Len=4.38988

Wing "Main Wing"
  location (X Y Z) -1.22951 0 0, rotation 0 0 0
  symmetric about XZ
  bounding box size 5.7659 11.0489 0.734667
  totals: TotalSpan=11.068 TotalProjectedSpan=11.041 TotalChord=3.38794 TotalArea=34.83 TotalAR=3.49996 MAC=3.36571
  root: chord 4.8847, twist 0, NACA 4-series Camber=0 CamberLoc=0.2 ThickChord=0.12
  sections:
    n  Span     Root_Chord  Tip_Chord  Area     Sweep  Sweep_Location  Dihedral  Twist  Twist_Location  tip airfoil
    1  1.87587  4.8847      3.38794    7.75921  35     0               -4        -1     0.25            NACA 4-series Camber=0 CamberLoc=0.2 ThickChord=0.06
    2  3.65811  3.38794     1.89118    9.65579  35     0               -4        -1     0.25            as above
  SS_Control "SS_CONT_0": UStart=0.4 UEnd=0.6 Length_C_Start=0.25 Length_C_End=0.25 Length_Start=0.996624 Length_End=0.697309 LE_Flag=0 Surf_Type=2

Wing "LEX", child of "Main Wing"
  location (X Y Z) -4.06985 0 0, rotation 0 0 0
  symmetric about XZ
  bounding box size 12.523 4.43029 0.750575
  totals: TotalSpan=4.43767 TotalProjectedSpan=4.43013 TotalChord=4.99237 TotalArea=30.8611 TotalAR=0.635948 MAC=9.05229
  root: chord 12.523, twist 0, NACA 4-series Camber=0 CamberLoc=0.2 ThickChord=0.06
  sections:
    n  Span      Root_Chord  Tip_Chord  Area      Sweep    Sweep_Location  Dihedral  Twist  Twist_Location  tip airfoil
    1  1.5       12.523      5.49257    13.5117   55       0               -4        0      0.25            NACA 4-series Camber=0 CamberLoc=0.2 ThickChord=0.03
    2  0.273303  5.49257     3.10785    1.17526   82.8479  0               0         0      0.25            as above
    3  0.44553   3.10785     0.230397   0.743644  81.3007  0               -1.28571  0      0.25            as above

Wing "H Stabs", child of "Main Wing"
  location (X Y Z) 4.67391 0 -0.326087, rotation 0 0 0
  symmetric about XZ
  bounding box size 4.31071 6.22815 0.304532
  totals: TotalSpan=6.2 TotalProjectedSpan=6.19854 TotalChord=1.84167 TotalArea=12.71 TotalAR=3.02296 MAC=2.20344
  root: chord 2.75, twist 0, NACA 4-series Camber=0 CamberLoc=0.2 ThickChord=0.1
  sections:
    n  Span  Root_Chord  Tip_Chord  Area   Sweep    Sweep_Location  Dihedral  Twist  Twist_Location  tip airfoil
    1  1.2   2.75        2.5        3.15   45       0               -2        0      0.25            as above
    2  1.4   2.5         1.4        2.73   50       0               0         0      0.25            as above
    3  0.5   1.4         0.5        0.475  59.1197  0               0         0      0.25            as above
  SS_Control "SS_CONT_0": UStart=0.4 UEnd=0.6 Length_C_Start=0.25 Length_C_End=0.25 Length_Start=0.625 Length_End=0.35 LE_Flag=0 Surf_Type=2

Wing "V Stab", child of "Main Wing"
  location (X Y Z) 4 0 0, rotation 90 0 0
  bounding box size 4.81384 0.350203 2.99252
  totals: TotalSpan=2.92937 TotalProjectedSpan=2.92937 TotalChord=2.08532 TotalArea=6.53296 TotalAR=1.31352 MAC=2.38806
  root: chord 3.5, twist 0, NACA 4-series Camber=0 CamberLoc=0.2 ThickChord=0.1
  sections:
    n  Span     Root_Chord  Tip_Chord  Area      Sweep    Sweep_Location  Dihedral  Twist  Twist_Location  tip airfoil
    1  0.6      3.5         2.71429    1.86429   45       0               0         0      0.25            as above
    2  2.22937  2.71429     1.375      4.55826   51.8571  0               0         0      0.25            as above
    3  0.1      1.375       0.833333   0.110417  51.8571  0               0         0      0.25            as above
  SS_Control "SS_CONT_0": UStart=0.4 UEnd=0.6 Length_C_Start=0.25 Length_C_End=0.25 Length_Start=0.678571 Length_End=0.34375 LE_Flag=0 Surf_Type=2

Pod "Wingtip Hardpoints", child of "Main Wing"
  location (X Y Z) 2.5 5.6 -0.4, rotation 0 0 0
  symmetric about XZ
  bounding box size 2.5 11.5333 0.333333
  Design: FineRatio=15 Length=2.5

Stack "Fuselage"
  location (X Y Z) -8.04348 0 -0.543478, rotation 0 0 0
  bounding box size 15.4352 1.37432 1.76503
  cross sections:
    n  XDelta   YDelta  ZDelta     shape
    0  0        0       0          point
    1  1.75     0       0.25       ellipse Ellipse_Height=1 Ellipse_Width=0.886364
    2  4.37705  0       0.25       ellipse Ellipse_Height=1.5 Ellipse_Width=0.886364
    3  5.5082   0       0          ellipse Ellipse_Height=1.5 Ellipse_Width=1.1876
    4  3.8      0       -0.327869  point

Stack "Cockpit", child of "Fuselage"
  location (X Y Z) -2.04918 0 0.5, rotation 0 0 0
  bounding box size 9.34016 0.863001 1.05252
  cross sections:
    n  XDelta   YDelta  ZDelta  shape
    0  0        0       0       point
    1  1.2459   0       0       ellipse Ellipse_Height=0.7 Ellipse_Width=0.85
    2  2.25     0       0       ellipse Ellipse_Height=0.95 Ellipse_Width=0.75
    3  5.34426  0       0       ellipse Ellipse_Height=0.675 Ellipse_Width=0.6
    4  0.5      0       0       point

Stack "Intakes", child of "Fuselage"
  location (X Y Z) 0.5 0 0, rotation 0 0 0
  bounding box size 7.71573 1.91343 1.64211
  cross sections:
    n  XDelta   YDelta  ZDelta     shape
    0  0        0       0          point
    1  0        0       -0.647368  circle Circle_Diameter=1.5
    2  1.22105  0       0.142105   as above
    3  3.07959  0       0          general fuselage BotStr=1.78942 BotTanAngle=90 CornerRad=0 Height=0.971591 LowStr=0.83 MaxWidthLoc=0 TopStr=1.07305 TopTanAngle=90 UpStr=0.83 Width=1.82538
    4  3.13115  0       0.35       general fuselage BotStr=1.78942 BotTanAngle=90 CornerRad=0 Height=0.75 LowStr=0.83 MaxWidthLoc=0 TopStr=0.878863 TopTanAngle=90 UpStr=0.83 Width=1.20408
    5  0.05     0       0          point

Stack "Engines", child of "Intakes"
  location (X Y Z) -1.5 0 0, rotation 0 0 0; relative location -2 0 0, rotation 0 0 0
  bounding box size 10.4413 1.4 1.4
  cross sections:
    n  XDelta    YDelta  ZDelta  shape
    0  0         0       0       circle Circle_Diameter=0.0381679
    1  0.342105  0       0       circle Circle_Diameter=0.486699
    2  1.72526   0       0       circle Circle_Diameter=0.885687
    3  1.19895   0       0       circle Circle_Diameter=0.843511
    4  5.6       0       0       circle Circle_Diameter=1.4
    5  1.4       0       0       circle Circle_Diameter=1.05
    6  0         0       0       point

Stack "Canopy Glass", child of "Fuselage"
  location (X Y Z) -5.36393 0 0.2, rotation 0 0 0
  bounding box size 5.2377 0.8 1.3
  cross sections:
    n  XDelta  YDelta  ZDelta      shape
    0  0       0       0           point
    1  1.7377  0       0.163934    ellipse Ellipse_Height=1.3 Ellipse_Width=0.8
    2  2       0       -0.0819672  ellipse Ellipse_Height=1 Ellipse_Width=0.4
    3  1       0       -0.0819672  ellipse Ellipse_Height=0.8 Ellipse_Width=0.4
    4  0.5     0       0           point

Mesh "MeshGeom"
  location (X Y Z) 0 0 0, rotation 0 0 0
  bounding box size 17.341 11.7333 4.3889
  triangle mesh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

NGonMesh "MeshGeom_NGon"
  location (X Y Z) 0 0 0, rotation 0 0 0

VSPAERO settings (reference component "Main Wing"): Sref=34.83 bref=11.068 cref=3.38794 Xcg=0 Ycg=0 Zcg=0 AlphaStart=1 AlphaEnd=5 AlphaNpts=3 BetaStart=0 BetaEnd=0 BetaNpts=1 MachStart=0 MachEnd=0 MachNpts=1 ReCref=1e+07 Vinf=185 Rho=0.5
  control group "Unnamed Control Group": DeflectionAngle=0
  control group "Main Wing_SS_CONT_0": DeflectionAngle=0
  control group "H Stabs_SS_CONT_0": DeflectionAngle=0
  control group "V Stab_SS_CONT_0": DeflectionAngle=0
