OpenVSP model (file version 5), 5 components.
Geometry view with OpenVSP parameter names; values to 6 digits, angles in degrees, lengths in the model's unit.
Overall bounding box: X_Min=-13.353 X_Len=42.6918 Y_Min=-18.1528 Y_Len=36.3055 Z_Min=-1.6173 Z_Len=11.2281

Wing "Main Wing"
  location (X Y Z) -4.035 0 0, rotation 0 0 0
  symmetric about XZ
  bounding box size 18.9175 36.3055 1.66008
  totals: TotalSpan=36.3167 TotalProjectedSpan=36.3055 TotalChord=11.1167 TotalArea=375 TotalAR=3.51491 MAC=11.043
  root: chord 16.0279, twist 1.5, NACA 65-series A=1 IdealCl=0 ThickChord=0.1
  sections:
    n  Span     Root_Chord  Tip_Chord  Area    Sweep  Sweep_Location  Dihedral  Twist      Twist_Location  tip airfoil
    1  6.15518  16.0279     11.1167    83.54   35     0               2         -0.666667  0.25            NACA 4-series Camber=0 CamberLoc=0.2 ThickChord=0.1
    2  12.0031  11.1167     6.20541    103.96  35     0               1         -1.33333   0.25            as above
  SS_Control "SS_CONT_0": UStart=0.4 UEnd=0.6 Length_C_Start=0.25 Length_C_End=0.25 Length_Start=3.26971 Length_End=2.28801 LE_Flag=0 Surf_Type=2

Wing "VStab", child of "Main Wing"
  location (X Y Z) 13.1234 0 0, rotation 90 0 0
  symmetric about XZ
  bounding box size 15.7935 1.14896 9.61079
  totals: TotalSpan=19.2216 TotalProjectedSpan=19.2216 TotalChord=6.8416 TotalArea=140.641 TotalAR=2.62705 MAC=7.83484
  root: chord 11.4829, twist 0, NACA 4-series Camber=0 CamberLoc=0.2 ThickChord=0.1
  sections:
    n  Span      Root_Chord  Tip_Chord  Area     Sweep    Sweep_Location  Dihedral  Twist  Twist_Location  tip airfoil
    1  1.9685    11.4829     8.90515    20.067   45       0               0         0      0.25            as above
    2  7.31421   8.90515     4.51115    49.0648  51.8571  0               0         0      0.25            as above
    3  0.328084  4.51115     2.73402    1.18851  51.8571  0               0         0      0.25            as above
  SS_Control "SS_CONT_0": UStart=0.4 UEnd=0.6 Length_C_Start=0.25 Length_C_End=0.25 Length_Start=2.22629 Length_End=1.12779 LE_Flag=0 Surf_Type=2

Wing "HStab", child of "Main Wing"
  location (X Y Z) 15.3346 0 -1.06955, rotation 0 0 0
  symmetric about XZ
  bounding box size 14.0041 20.3364 1.00454
  totals: TotalSpan=20.3412 TotalProjectedSpan=20.3364 TotalChord=6.04221 TotalArea=136.809 TotalAR=3.02296 MAC=7.34361
  root: chord 9.02231, twist -0.5, NACA 4-series Camber=0 CamberLoc=0.2 ThickChord=0.1
  sections:
    n  Span     Root_Chord  Tip_Chord  Area     Sweep  Sweep_Location  Dihedral  Twist  Twist_Location  tip airfoil
    1  3.93701  9.02231     8.2021     33.9063  45     0               -2        0      0.25            as above
    2  4.59318  8.2021      4.59318    29.3855  50     0               0         0      0.25            as above
    3  1.64042  4.59318     1.64042    5.11286  60     0               0         0      0.25            as above
  SS_Control "SS_CONT_0": UStart=0.4 UEnd=0.6 Length_C_Start=0.25 Length_C_End=0.25 Length_Start=2.05053 Length_End=1.14829 LE_Flag=0 Surf_Type=2

Wing "LERX", child of "Main Wing"
  location (X Y Z) -13.353 0 0, rotation 0 0 0
  symmetric about XZ
  bounding box size 41.0859 15.0341 1.25188
  totals: TotalSpan=15.0593 TotalProjectedSpan=15.0341 TotalChord=22.5558 TotalArea=352.729 TotalAR=0.640783 MAC=29.3488
  root: chord 41.0859, twist 0, NACA 4-series Camber=0 CamberLoc=0.2 ThickChord=0.03
  sections:
    n  Span      Root_Chord  Tip_Chord  Area     Sweep    Sweep_Location  Dihedral  Twist  Twist_Location  tip airfoil
    1  0.25      41.0859     41.0859    10.2715  0        0               -4        0      0.25            as above
    2  4.92126   41.0859     18.0202    145.438  55       0               -4        0      0.25            as above
    3  0.896653  18.0202     10.1964    12.6503  82.8479  0               0         0      0.25            as above
    4  1.46171   10.1964     0.755906   8.00453  81.3007  0               0         0      0.25            as above

NGonMesh "MeshGeom_NGon"
  location (X Y Z) 0 0 0, rotation 0 0 0

VSPAERO settings (reference component "Main Wing"): Sref=375 bref=36.3167 cref=11.1167 Xcg=8.15999 Ycg=0 Zcg=0.13962 AlphaStart=1 AlphaEnd=1 AlphaNpts=1 BetaStart=0 BetaEnd=0 BetaNpts=1 MachStart=0 MachEnd=0 MachNpts=1 ReCref=1e+07 Vinf=1989.09 Rho=0.000891
  control group "Main Wing_SS_CONT_0": DeflectionAngle=0
  control group "VStab_SS_CONT_0": DeflectionAngle=0
  control group "HStab_SS_CONT_0": DeflectionAngle=0
