OpenVSP model (file version 5), 66 components.
Geometry view with OpenVSP parameter names; values to 6 digits, angles in degrees, lengths in the model's unit.
Overall bounding box: X_Min=0 X_Len=49.2834 Y_Min=-19.3248 Y_Len=38.6496 Z_Min=-7.31474 Z_Len=16.9255

Wing "Main Wing"
  location (X Y Z) 18.553 0 0, rotation 0 0 0
  symmetric about XZ
  bounding box size 19.5379 37.4962 1.71452
  mass: Density=0.369 Shell_Flag=0 Mass_Area=0 Mass_Prior=1
  totals: TotalSpan=37.5077 TotalProjectedSpan=37.4962 TotalChord=11.4813 TotalArea=400 TotalAR=3.51491 MAC=11.4052
  root: chord 16.5536, twist 1.5, NACA 65-series A=1 IdealCl=0 ThickChord=0.1
  sections:
    n  Span     Root_Chord  Tip_Chord  Area     Sweep  Sweep_Location  Dihedral  Twist      Twist_Location  tip airfoil
    1  6.35705  16.5536     11.4813    89.1094  35     0               2         -0.666667  0.25            NACA 4-series Camber=0 CamberLoc=0.2 ThickChord=0.1
    2  12.3968  11.4813     6.40893    110.891  35     0               1         -1.33333   0.25            as above
  SS_Control "Inboard flaps": UStart=0.35 UEnd=0.5 Length_C_Start=0.25 Length_C_End=0.25 Length_Start=3.6306 Length_End=2.87031 LE_Flag=0 Surf_Type=2
  SS_Control "Flaperons": UStart=0.5 UEnd=0.6 Length_C_Start=0.25 Length_C_End=0.25 Length_Start=2.87031 Length_End=2.36305 LE_Flag=0 Surf_Type=2
  SS_Control "Ailerons": UStart=0.6 UEnd=0.725 Length_C_Start=0.25 Length_C_End=0.25 Length_Start=2.36305 Length_End=1.72902 LE_Flag=0 Surf_Type=2
  SS_Control "LE Slats": UStart=0.55 UEnd=0.75 Length_C_Start=0.15 Length_C_End=0.15 Length_Start=1.57001 Length_End=0.961339 LE_Flag=1 Surf_Type=2

Wing "VStab", child of "Main Wing"
  location (X Y Z) 30.9614 0 0, rotation 90 0 0
  symmetric about XZ
  bounding box size 15.7935 1.14896 9.61079
  mass: Density=0.621115 Shell_Flag=0 Mass_Area=1 Mass_Prior=0
  totals: TotalSpan=19.2216 TotalProjectedSpan=19.2216 TotalChord=6.8416 TotalArea=140.641 TotalAR=2.62705 MAC=7.83484
  root: chord 11.4829, twist 0, NACA 4-series Camber=0 CamberLoc=0.2 ThickChord=0.1
  sections:
    n  Span      Root_Chord  Tip_Chord  Area     Sweep    Sweep_Location  Dihedral  Twist  Twist_Location  tip airfoil
    1  1.9685    11.4829     8.90515    20.067   45       0               0         0      0.25            as above
    2  7.31421   8.90515     4.51115    49.0648  51.8571  0               0         0      0.25            as above
    3  0.328084  4.51115     2.73402    1.18851  51.8571  0               0         0      0.25            as above
  SS_Control "Lower Rudder": UStart=0.42 UEnd=0.5 Length_C_Start=0.25 Length_C_End=0.25 Length_Start=2.11644 Length_End=1.67704 LE_Flag=0 Surf_Type=2
  SS_Control "Upper Rudder": UStart=0.5 UEnd=0.6 Length_C_Start=0.25 Length_C_End=0.25 Length_Start=1.67704 Length_End=1.12779 LE_Flag=0 Surf_Type=2

Wing "HStab", child of "Main Wing"
  location (X Y Z) 33.1727 0 -1.06955, rotation 0 0 0
  symmetric about XZ
  bounding box size 14.278 20.995 1.00294
  mass: Density=0.252821 Shell_Flag=0 Mass_Area=1 Mass_Prior=0
  totals: TotalSpan=21 TotalProjectedSpan=20.995 TotalChord=6 TotalArea=140.253 TotalAR=3.14283 MAC=7.29231
  root: chord 8.95928, twist -0.5, NACA 4-series Camber=0 CamberLoc=0.2 ThickChord=0.1
  sections:
    n  Span     Root_Chord  Tip_Chord  Area     Sweep  Sweep_Location  Dihedral  Twist  Twist_Location  tip airfoil
    1  4.06452  8.95928     8.1448     34.7599  45     0               -2        0      0.25            as above
    2  4.74194  8.1448      4.56109    30.1252  50     0               0         0      0.25            as above
    3  1.69355  4.56109     1.62896    5.24157  60     0               0         0      0.25            as above
  SS_Control "Inboard Elevators": UStart=0.3 UEnd=0.4 Length_C_Start=0.25 Length_C_End=0.25 Length_Start=2.13799 Length_End=2.0362 LE_Flag=0 Surf_Type=2
  SS_Control "Outboard Elevators": UStart=0.4 UEnd=0.6 Length_C_Start=0.25 Length_C_End=0.25 Length_Start=2.0362 Length_End=1.14027 LE_Flag=0 Surf_Type=2

Wing "LERX", child of "Main Wing"
  location (X Y Z) 16.402 0 0.25, rotation 0 0 0
  symmetric about XZ
  bounding box size 10.4918 17.6307 0.478585
  mass: Density=0.458283 Shell_Flag=0 Mass_Area=1 Mass_Prior=0
  totals: TotalSpan=17.6358 TotalProjectedSpan=17.6307 TotalChord=3.5 TotalArea=72.06 TotalAR=4.31363 MAC=4.67542
  root: chord 4, twist 0, NACA 4-series Camber=0 CamberLoc=0.2 ThickChord=0.07
  sections:
    n  Span      Root_Chord  Tip_Chord  Area     Sweep  Sweep_Location  Dihedral  Twist  Twist_Location  tip airfoil
    1  3         4           6          15       0      0               2         0      0.25            as above
    2  4.92126   6           2          19.685   55     0               1         0      0.25            as above
    3  0.896653  2           1          1.34498  70     0               0         0      0.25            as above

Stack "Wing hardpoints", child of "Main Wing"
  location (X Y Z) 29 8 0, rotation 0 90 0
  symmetric about XZ
  bounding box size 4 16.8001 2.66667
  mass: Density=0 Shell_Flag=0 Mass_Area=0 Mass_Prior=0 PointMass=7.78 CGx=1 CGy=0 CGz=0 Ixx=0 Iyy=0 Izz=0 Ixy=0 Ixz=0 Iyz=0
  cross sections:
    n  XDelta  XRotate  YDelta  ZDelta  shape
    0  0       0        0       0       point
    1  0       90       0       0       NACA 4-digit modified Camber=0 CamberLoc=0.2 Chord=4 IdealCl=0 LERadIndx=6 ThickChord=0.2 ThickLoc=0.3
    2  1       0        0       0       as above
    3  1       0        0       0       as above
    4  0       0        0       0       point

Stack "A2A - AIM 120C (fuse mounted)", child of "Wing hardpoints"
  location (X Y Z) 22 2.75 -1.06557, rotation 0 0 0
  symmetric about XZ
  bounding box size 12.0972 6.08333 0.583333
  cross sections:
    n  XDelta  YDelta  ZDelta  shape
    0  0       0       0       point
    1  2       0       0       circle Circle_Diameter=0.583333
    2  10      0       0       as above
    3  0       0       0       point

Stack "AIM 120C (inboard)", child of "A2A - AIM 120C (fuse mounted)"
  location (X Y Z) 23 7.34016 -1.8, rotation 0 0 0
  symmetric about XZ
  bounding box size 12.0972 15.2637 0.583333
  cross sections:
    n  XDelta  YDelta  ZDelta  shape
    0  0       0       0       point
    1  2       0       0       circle Circle_Diameter=0.583333
    2  10      0       0       as above
    3  0       0       0       point

Stack "AIM 120C (outboard)", child of "A2A - AIM 120C (fuse mounted)"
  location (X Y Z) 23 8.65 -1.8, rotation 0 0 0
  symmetric about XZ
  bounding box size 12.0972 17.8833 0.583333
  cross sections:
    n  XDelta  YDelta  ZDelta  shape
    0  0       0       0       point
    1  2       0       0       circle Circle_Diameter=0.583333
    2  10      0       0       as above
    3  0       0       0       point

Stack "AIM 9X (outboard)", child of "A2A - AIM 120C (fuse mounted)"
  location (X Y Z) 28.5 19 0.425, rotation 0 0 0
  symmetric about XZ
  bounding box size 9.98611 38.6496 0.649576
  cross sections:
    n  XDelta   YDelta  ZDelta  shape
    0  0        0       0       point
    1  1        0       0       circle Circle_Diameter=0.416667
    2  8.91667  0       0       as above
    3  0        0       0       point

Stack "STRK - MK83 JDAM (fuse mounted)", child of "Wing hardpoints"
  location (X Y Z) 22 2.75 -1.06557, rotation 0 0 0
  symmetric about XZ
  bounding box size 9.83333 6.92917 1.42917
  cross sections:
    n  XDelta  YDelta  ZDelta  shape
    0  0       0       0       point
    1  4       0       0       circle Circle_Diameter=1.16667
    2  3       0       0       as above
    3  2.8     0       0       circle Circle_Diameter=0.2
    4  0       0       0       point

Stack "STRK - MK83 JDAM (wing mounted)", child of "STRK - MK83 JDAM (fuse mounted)"
  location (X Y Z) 23.8852 7.1 -1.6, rotation 0 0 0
  symmetric about XZ
  bounding box size 9.83333 15.6292 1.42917
  cross sections:
    n  XDelta  YDelta  ZDelta  shape
    0  0       0       0       point
    1  4       0       0       circle Circle_Diameter=1.16667
    2  3       0       0       as above
    3  2.8     0       0       circle Circle_Diameter=0.2
    4  0       0       0       point

Stack "AIM 9X (outboard)", child of "STRK - MK83 JDAM (fuse mounted)"
  location (X Y Z) 28.5 19 0.425, rotation 0 0 0
  symmetric about XZ
  bounding box size 9.98611 38.6496 0.649576
  cross sections:
    n  XDelta   YDelta  ZDelta  shape
    0  0        0       0       point
    1  1        0       0       circle Circle_Diameter=0.416667
    2  8.91667  0       0       as above
    3  0        0       0       point

Stack "Drop tank", child of "Wing hardpoints"
  location (X Y Z) 20 0 -3.25, rotation 0 0 0
  symmetric about XZ
  bounding box size 15.5 2.66667 2.66667
  mass: Density=0 Shell_Flag=0 Mass_Area=1 Mass_Prior=0
  cross sections:
    n  XDelta  YDelta  ZDelta  shape
    0  0       0       0       point
    1  4       0       0       circle Circle_Diameter=2.66667
    2  3       0       0       as above
    3  3.5     0       0       as above
    4  5       0       0       point

Stack "Fuselage"
  location (X Y Z) 1.0002 0 -0.000496, rotation 0 0 0
  bounding box size 44.1937 5 5.5
  mass: Density=0.0796802 Shell_Flag=0 Mass_Area=1 Mass_Prior=4
  cross sections:
    n  XDelta   YDelta  ZDelta  shape
    0  0        0       0       point
    1  3        0       0       ellipse Ellipse_Height=3 Ellipse_Width=3
    2  14.3604  0       0       rounded rectangle RoundRectXSec_Radius=1 RoundedRect_Height=5 RoundedRect_Width=3.5
    3  15       0       0       rounded rectangle RoundRectXSec_Radius=1.5 RoundedRect_Height=5.5 RoundedRect_Width=5
    4  11       0       0.4     ellipse Ellipse_Height=4 Ellipse_Width=5
    5  0        0       0       point

Stack "F135-PW-100 ENGINE", child of "Fuselage"
  location (X Y Z) 31.95 0 0, rotation 0 0 0
  bounding box size 17.3334 4.78328 4.78328
  mass: Density=0 Shell_Flag=0 Mass_Area=0 Mass_Prior=0 PointMass=155.42 CGx=9.16666 CGy=0 CGz=0 Ixx=0 Iyy=0 Izz=0 Ixy=0 Ixz=0 Iyz=0
  cross sections:
    n  XDelta   YDelta  ZDelta  shape
    0  0        0       0       circle Circle_Diameter=3.83333
    1  3.66667  0       0       as above
    2  2.66667  0       0.3     as above
    3  6.83334  0       0       as above
    4  0.5      0       0       circle Circle_Diameter=4.5
    5  3.66667  0       0       circle Circle_Diameter=3.5
    6  0        0       0       as above

Propeller "Main Fan", child of "F135-PW-100 ENGINE"
  location (X Y Z) 31.95 0 0, rotation 0 0 0
  bounding box size 0.188848 3.78694 3.8044
  mass: Density=0 Shell_Flag=0 Mass_Area=0 Mass_Prior=0
  Design: Diameter=3.8 NumBlade=15 Beta34=20 UseBeta34Flag=1 Feather=0 Rotate=0 Precone=0 ReverseFlag=0 FoldAngle=0 PropMode=0 AF=151.538 CLi=0.538798 Chord=0.177656 Solidity=0.848246 ConstructXoC=0.5 FeatherAxisXoC=0.5 FeatherOffsetXoC=0
  cross sections:
    n  RadiusFrac  shape
    0  0.2         ellipse Ellipse_Height=0.076 Ellipse_Width=0.152
    1  0.4         NACA 16-series Chord=0.315875 IdealCl=0.7 ThickChord=0.144074
    2  1           NACA 16-series Chord=0.247 IdealCl=0.2 ThickChord=0.03
  Chord along r/R (cubic Bezier): 0.2: 0.08, 0.333333: 0.15, 0.466667: 0.2, 0.6: 0.2, 0.716667: 0.2, 0.833333: 0.2, 0.95: 0.2, 0.966667: 0.2, 0.983333: 0.2, 1: 0.13
  Twist along r/R (PCHIP): 0.2: 46.75, 0.75: 20, 1: 13
  Thick along r/R (cubic Bezier): 0.2: 0.5, 0.233333: 0.3, 0.266667: 0.225, 0.3: 0.2, 0.4: 0.125, 0.5: 0.115, 0.6: 0.1, 0.733333: 0.075, 0.866667: 0.055, 1: 0.03
  CLI along r/R (cubic Bezier): 0.2: 0, 0.266667: 0.7, 0.333333: 0.7, 0.4: 0.7, 0.466667: 0.7, 0.533333: 0.7, 0.6: 0.7, 0.733333: 0.7, 0.866667: 0.7, 1: 0.2

Pod "Fan Diffuser", child of "Main Fan"
  location (X Y Z) 30.95 0 0, rotation 0 0 0
  bounding box size 5.72727 0.763636 0.763636
  mass: Density=0 Shell_Flag=0 Mass_Area=0 Mass_Prior=0
  Design: FineRatio=15 Length=5.72727

Stack "FADEC", child of "F135-PW-100 ENGINE"
  location (X Y Z) 33.6467 -1.55738 -1.10492, rotation -55 0 0
  bounding box size 3.5 1.9663 2.21188
  mass: Density=0 Shell_Flag=0 Mass_Area=0 Mass_Prior=0
  cross sections:
    n  XDelta  YDelta  ZDelta  shape
    0  0       0       0       point
    1  0       0       0       rounded rectangle RoundRectXSec_Radius=0.2 RoundedRect_Height=1 RoundedRect_Width=2
    2  2       0       0       as above
    3  1       0       0       rounded rectangle RoundRectXSec_Radius=0.2 RoundedRect_Height=1 RoundedRect_Width=1
    4  0       0       0       point

Stack "Dual Air Intakes", child of "Fuselage"
  location (X Y Z) 15.2 -1.6 0, rotation 0 0 0
  symmetric about XZ
  bounding box size 16.5 5.96606 3.86606
  cross sections:
    n  XDelta  YDelta  ZDelta  shape
    0  0       0       0       edit curve Width=1.25 Height=2.25 AbsoluteFlag=0 SymType=0 linear points (X Y): 0 0.0267123, 0 -0.162329, 0 -0.8, -1 -0.3, -1 0.00616438, -1 0.3, 0 0.8, 0 0.182877, 0 0.0267123
    1  3       0       0       circle Circle_Diameter=2.5
    2  5.5     0       0       as above
    3  8       1.6     0       circle Circle_Diameter=3.83333
    4  0       0       0       as above

Stack "Canopy", child of "Fuselage"
  location (X Y Z) 10.2 0 1.4, rotation 0 0 0
  bounding box size 12.2628 2.62467 5
  cross sections:
    n  XDelta   YDelta  ZDelta    shape
    0  0        0       0         point
    1  5.70111  0       0.537828  ellipse Ellipse_Height=5 Ellipse_Width=2.62467
    2  6.56168  0       0.26893   ellipse Ellipse_Height=2 Ellipse_Width=1.31234
    3  0        0       0         as above
    4  0        0       0         point

Human "Pilot", child of "Canopy"
  location (X Y Z) 16.5 0 1.73913, rotation 0 0 0
  bounding box size 3.1862 2.0989 4.44846
  mass: Density=68.634 Shell_Flag=0 Mass_Area=1 Mass_Prior=0
  Anthropometric: Age=30 AutoDensity=1 BMI=27.7 BMI_pct=0.5 GenderFlag=0 LenUnit=4 Mass=188.306 MassUnit=3 SitFrac=0.51 Stature=5.76115 Stature_pct=0.5 Volume=2.74362

Custom "Seat", child of "Canopy"
  location (X Y Z) 16.25 0 0.75, rotation 0 -90 0
  bounding box size 1.55768 1.24179 2.82578
  Design: BackAngle=0 BackHeight=2.45078 BackThick=0.25 SeatHeight=0.25 SeatLength=1.43268 Width=1.24179
  custom script Seat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

Stack "AN-APG-85 RADAR", child of "Fuselage"
  location (X Y Z) 4.2 0 0, rotation 0 0 0
  bounding box size 5 3 3
  cross sections:
    n  XDelta  YDelta  ZDelta  shape
    0  0       0       0       point
    1  0       0       0       circle Circle_Diameter=3
    2  2       0       0       rounded rectangle RoundRectXSec_Radius=0.2 RoundedRect_Height=2 RoundedRect_Width=2
    3  2       0       0       as above
    4  0.5     0       0       point

Stack "GAU-22-A CANNON", child of "Fuselage"
  location (X Y Z) 13.2 0 -1.65, rotation 0 0 0
  bounding box size 3.5 1.5 1.5
  cross sections:
    n  XDelta  YDelta  ZDelta  shape
    0  0       0       0       point
    1  0       0       0       circle Circle_Diameter=1.5
    2  2       0       0       as above
    3  1       0       0       as above
    4  0       0       0       point

Stack "Cannon barrels", child of "GAU-22-A CANNON"
  location (X Y Z) 6.36066 0 -2.2, rotation 0 0 0
  bounding box size 7.00003 0.333333 0.333333
  cross sections:
    n  XDelta  YDelta  ZDelta  shape
    0  0       0       0       circle Circle_Diameter=0.333333
    1  7       0       0       as above
    2  0       0       0       as above
    3  0       0       0       as above

Stack "AN-ASQ-242 CNI RADIO-IFF", child of "Fuselage"
  location (X Y Z) 8.95 0 -0.6, rotation 0 0 0
  bounding box size 3.75 2.5 2
  cross sections:
    n  XDelta  YDelta  ZDelta  shape
    0  0       0       0       point
    1  0       0       0       rounded rectangle RoundRectXSec_Radius=0.2 RoundedRect_Height=2 RoundedRect_Width=2.5
    2  2       0       0       as above
    3  1       0       0       as above
    4  0       0       0       point

Stack "Primary active control module", child of "Fuselage"
  location (X Y Z) 23.2 0 1.6, rotation 0 0 0
  bounding box size 3.66667 2.5 1.5
  cross sections:
    n  XDelta  YDelta  ZDelta  shape
    0  0       0       0       point
    1  0       0       0       rounded rectangle RoundRectXSec_Radius=0.2 RoundedRect_Height=1.5 RoundedRect_Width=2.5
    2  2       0       0       rounded rectangle RoundRectXSec_Radius=0.2 RoundedRect_Height=1.5 RoundedRect_Width=2
    3  1       0       0       rounded rectangle RoundRectXSec_Radius=0.2 RoundedRect_Height=1.5 RoundedRect_Width=1
    4  0       0       0       point

Stack "Secondary active control module", child of "Primary active control module"
  location (X Y Z) 17.0525 0 -1.3082, rotation 0 0 0
  bounding box size 3.66667 2.5 1.5
  cross sections:
    n  XDelta  YDelta  ZDelta  shape
    0  0       0       0       point
    1  0       0       0       rounded rectangle RoundRectXSec_Radius=0.2 RoundedRect_Height=1.5 RoundedRect_Width=2.5
    2  2       0       0       rounded rectangle RoundRectXSec_Radius=0.2 RoundedRect_Height=1.5 RoundedRect_Width=2
    3  1       0       0       rounded rectangle RoundRectXSec_Radius=0.2 RoundedRect_Height=1.5 RoundedRect_Width=1
    4  0       0       0       point

Stack "Fuselage fuel tank", child of "Fuselage"
  location (X Y Z) 27.2984 0 1.8, rotation 0 0 0
  bounding box size 9.24633 4.25 1.5
  mass: Density=0.312 Shell_Flag=0 Mass_Area=1 Mass_Prior=0
  cross sections:
    n  XDelta  YDelta  ZDelta  shape
    0  0       0       0       point
    1  -1      0       0       ellipse Ellipse_Height=1.25 Ellipse_Width=3.5
    2  2       0       0.25    as above
    3  3       0       0       ellipse Ellipse_Height=1.25 Ellipse_Width=4.25
    4  3       0       0       ellipse Ellipse_Height=1 Ellipse_Width=3.5
    5  0       0       0       point

Stack "Inflight refuel probe", child of "Fuselage fuel tank"
  location (X Y Z) 20.2 -1.33333 2.04918, rotation 0 0 0
  bounding box size 9.5 0.907404 0.757404
  mass: Density=0.312 Shell_Flag=0 Mass_Area=1 Mass_Prior=0
  cross sections:
    n  XDelta  YDelta  ZDelta  shape
    0  0       0       0       point
    1  3       0       0       circle Circle_Diameter=0.5
    2  2       0.4     -0.25   as above
    3  4       0       0       as above
    4  0.5     0       0       point

Wing "Wing fuel tanks", child of "Fuselage fuel tank"
  location (X Y Z) 22.7 3.19672 0, rotation 0 0 0
  symmetric about XZ
  bounding box size 12.4506 32.3867 0.892421
  mass: Density=0.312 Shell_Flag=0 Mass_Area=1 Mass_Prior=0
  totals: TotalSpan=26 TotalProjectedSpan=25.9933 TotalChord=5.83731 TotalArea=135.492 TotalAR=4.98663 MAC=5.4963
  root: chord 8, twist 1.5, NACA 65-series A=1 IdealCl=0 ThickChord=0.1
  sections:
    n  Span  Root_Chord  Tip_Chord  Area     Sweep  Sweep_Location  Dihedral  Twist      Twist_Location  tip airfoil
    1  3     8           6          21       35     0               2         -0.666667  0.25            NACA 4-series Camber=0 CamberLoc=0.2 ThickChord=0.1
    2  10    6           3.34925    46.7462  35     0               1         -1.33333   0.25            as above

Stack "Primary hydraulic pump", child of "Fuselage"
  location (X Y Z) 20.741 0 -1.6, rotation 0 0 0
  bounding box size 3.5 1.5 1.5
  cross sections:
    n  XDelta  YDelta  ZDelta  shape
    0  0       0       0       point
    1  0       0       0       rounded rectangle RoundRectXSec_Radius=0.2 RoundedRect_Height=1.5 RoundedRect_Width=1.5
    2  2       0       0       as above
    3  1       0       0       as above
    4  0       0       0       point

Stack "Secondary hydraulic pump", child of "Primary hydraulic pump"
  location (X Y Z) 37.4623 1.65 0.121311, rotation 0 0 0
  bounding box size 3.5 1.5 1.5
  cross sections:
    n  XDelta  YDelta  ZDelta  shape
    0  0       0       0       point
    1  0       0       0       rounded rectangle RoundRectXSec_Radius=0.2 RoundedRect_Height=1.5 RoundedRect_Width=1.5
    2  2       0       0       as above
    3  1       0       0       as above
    4  0       0       0       point

Blank "Landing Gear"
  location (X Y Z) 0 0 0, rotation 0 0 0

Blank "Rear_Gear", child of "Landing Gear"
  location (X Y Z) 0 0 0, rotation 0 0 0

BodyOfRevolution "Right_Wheel", child of "Rear_Gear"
  location (X Y Z) 31.4796 5.30788 -6.09085, rotation 0 0 90
  symmetric about XZ
  bounding box size 2.44778 12.6264 2.44778
  Design: A0=0 Ae=0 Amin=0 AminW=0 Angle=0 Diameter=3.23102 Mode=2
  profile: rounded rectangle RoundRectXSec_Radius=0.252706 RoundedRect_Height=2.44778 RoundedRect_Width=1.00534

Stack "LG_Flex", child of "Rear_Gear"
  location (X Y Z) 29.2485 4.3231 -5.69994, rotation 0 7.86885 13.7295
  symmetric about XZ
  bounding box size 2.48738 10.3533 0.935881
  cross sections:
    n  XDelta  YDelta  ZDelta  shape
    0  0       0       0       circle Circle_Diameter=0.609375
    1  2.3493  0       0       as above

Stack "Main_Beam", child of "Rear_Gear"
  location (X Y Z) 28.822 3.29723 -3.75194, rotation 23.9344 82.9508 0
  symmetric about XZ
  bounding box size 1.01829 8.94729 2.20738
  cross sections:
    n  XDelta     YDelta  ZDelta  shape
    0  0          0       0       circle Circle_Diameter=0.646025
    1  0.61084    0       0       circle Circle_Diameter=0.64602
    2  0.166761   0       0       circle Circle_Diameter=0.780204
    3  0.777601   0       0       circle Circle_Diameter=0.78021
    4  0.185495   0       0       circle Circle_Diameter=0.64602
    5  0.185495   0       0       as above
    6  0.0279862  0       0       circle Circle_Diameter=0

Stack "Adj_beam", child of "Rear_Gear"
  location (X Y Z) 28.5771 1.12182 -1.97027, rotation 40.9016 82.9508 -5
  symmetric about XZ
  bounding box size 0.913861 7.13831 3.41352
  cross sections:
    n  XDelta    YDelta  ZDelta  shape
    0  0         0       0       point
    1  0         0       0       circle Circle_Diameter=0.438998
    2  0.843185  0       0       circle Circle_Diameter=0.28394
    3  2.26909   0       0       as above
    4  0.760691  0       0       circle Circle_Diameter=0.292969

Stack "Adj_beam_sup", child of "Rear_Gear"
  location (X Y Z) 28.9949 3.2713 -4.98385, rotation 40.9016 82.9508 0
  symmetric about XZ
  bounding box size 0.479528 7.2656 0.537663
  cross sections:
    n  XDelta     YDelta  ZDelta  shape
    0  0          0       0       circle Circle_Diameter=0.186328
    1  0.032392   0       0       circle Circle_Diameter=0.45
    2  0.175792   0       0       as above
    3  0.0555099  0       0       point

Stack "Main_Damper", child of "Rear_Gear"
  location (X Y Z) 28.822 3.29723 -3.75194, rotation 32.0492 46.6419 0
  symmetric about XZ
  bounding box size 2.75498 9.90378 2.72099
  cross sections:
    n  XDelta     YDelta  YRotate  ZDelta  shape
    0  0          0       0        0       circle Circle_Diameter=0.539347
    1  0.61084    0       0        0       as above
    2  0.028215   0       0        0       circle Circle_Diameter=0.45
    3  0.777601   0       0        0       as above
    4  0.0282175  0       0        0       circle Circle_Diameter=0.539347
    5  1.11991    0       0        0       as above
    6  0.166761   0       0        0       as above
    7  0.596731   0       55.2857  0       circle Circle_Diameter=0.275672

Stack "Bearing", child of "Rear_Gear"
  location (X Y Z) 29.0526 4.82368 -5.59058, rotation 28.4426 7.12499 -88.4802
  symmetric about XZ
  bounding box size 0.450971 9.86429 0.989611
  cross sections:
    n  XDelta     YDelta  ZDelta  shape
    0  0          0       0       point
    1  0.0459048  0       0       circle Circle_Diameter=0.37215
    2  1.17497    0       0       as above
    3  0.0459067  0       0       point

BodyOfRevolution "Adapter", child of "Rear_Gear"
  location (X Y Z) 31.4796 4.52069 -6.09085, rotation 0 0 90
  symmetric about XZ
  bounding box size 0.714234 11.052 0.714234
  Design: A0=0 Ae=0 Amin=0 AminW=0 Angle=0 Diameter=3.23102 Mode=2
  profile: rounded rectangle RoundRectXSec_Radius=0.310264 RoundedRect_Height=0.714234 RoundedRect_Width=1.00534

Stack "StackGeom", child of "Rear_Gear"
  location (X Y Z) 29.0857 4.66321 -5.65155, rotation -175.533 -82.9975 154.549
  symmetric about XZ
  bounding box size 0.902774 9.53159 1.13925
  cross sections:
    n  XDelta  YDelta  ZDelta  ZRotate  shape
    0  0       0       0       0        rounded rectangle RoundRectXSec_Radius=0.045 RoundedRect_Height=0 RoundedRect_Width=0
    1  0       0       0       0        rounded rectangle RoundRectXSec_Radius=0.045 RoundedRect_Height=0.7875 RoundedRect_Width=0.225
    2  0.45    -0.45   0       -90      as above
    3  0.45    -0.45   0       -90      as above
    4  0       0       0       0        point

BodyOfRevolution "Wheel_int", child of "Rear_Gear"
  location (X Y Z) 31.4796 5.6364 -6.09085, rotation 0 0 90
  symmetric about XZ
  bounding box size 1.66187 12.6379 1.66187
  Design: A0=0 Ae=0 Amin=0 AminW=0 Angle=0 Diameter=2.19363 Mode=2
  profile: rounded rectangle RoundRectXSec_Radius=0 RoundedRect_Height=1.66187 RoundedRect_Width=0.682554

Wing "LG_F_Door", child of "Rear_Gear"
  location (X Y Z) 31.6504 -1.69875 -1.63934, rotation 20.3689 0 180
  symmetric about XZ
  bounding box size 6.22954 7.56048 1.96073
  totals: TotalSpan=5.31404 TotalProjectedSpan=4.2878 TotalChord=5.73425 TotalArea=31.3467 TotalAR=0.586513 MAC=5.96228
  root: chord 6.13331, twist 0, rounded rectangle RoundRectXSec_Radius=0 RoundedRect_Height=0.04505 RoundedRect_Width=6.13331
  sections:
    n  Span      Root_Chord  Tip_Chord  Area     Sweep    Sweep_Location  Dihedral  Twist  Twist_Location  tip airfoil
    1  1.8378    6.13331     6.13332    11.2718  0        0               -10       0      0.25            rounded rectangle RoundRectXSec_Radius=0 RoundedRect_Height=0.0450397 RoundedRect_Width=6.13332
    2  0.307069  6.13332     6.22945    1.89811  0        0               -65.9375  0      0.25            rounded rectangle RoundRectXSec_Radius=0 RoundedRect_Height=0.04505 RoundedRect_Width=6.22945
    3  0.512153  6.22945     3.54665    2.50343  76.2857  0               -65.9375  0      0.25            rounded rectangle RoundRectXSec_Radius=0 RoundedRect_Height=0.04505 RoundedRect_Width=3.54665

Blank "Nose_Wheel"
  location (X Y Z) 0 0 0, rotation 0 0 0

BodyOfRevolution "Nose_wheels", child of "Nose_Wheel"
  location (X Y Z) 14.6151 0.324601 -5.45299, rotation 0 0 90
  symmetric about XZ
  bounding box size 2.42002 2.63708 2.42002
  Design: A0=0 Ae=0 Amin=0 AminW=0 Angle=0 Diameter=3.19438 Mode=2
  profile: rounded rectangle RoundRectXSec_Radius=0.24984 RoundedRect_Height=2.42002 RoundedRect_Width=0.993938

Stack "Main_Beam", child of "Nose_wheels"
  location (X Y Z) 14.3579 0 -2.24464, rotation 0 90 0
  bounding box size 0.95359 0.95359 3.38573
  cross sections:
    n  XDelta     YDelta  ZDelta  shape
    0  0          0       0       circle Circle_Diameter=0.789587
    1  0.203819   0       0       circle Circle_Diameter=0.78958
    2  0.203819   0       0       circle Circle_Diameter=0.953583
    3  0.950401   0       0       circle Circle_Diameter=0.95359
    4  0.226717   0       0       circle Circle_Diameter=0.64196
    5  0.549612   0       0       as above
    6  0.0563247  0       0       circle Circle_Diameter=0.41258
    7  1.1228     0       0       circle Circle_Diameter=0.427973
    8  0.0342054  0       0       circle Circle_Diameter=0

Stack "Main_Beam", child of "Main_Beam"
  location (X Y Z) 13.9898 0 -3.81441, rotation 0 90 0
  bounding box size 0.583588 0.583588 0.661178
  cross sections:
    n  XDelta     YDelta  ZDelta  shape
    0  0          0       0       circle Circle_Diameter=0
    1  0          0       0       circle Circle_Diameter=0.481855
    2  0.170173   0       0       as above
    3  0.170173   0       0       as above
    4  0.0252732  0       0       circle Circle_Diameter=0.583588
    5  0.182248   0       0       as above
    6  0.0252725  0       0       circle Circle_Diameter=0.481855
    7  0.0623627  0       0       as above
    8  0.0256745  0       0       circle Circle_Diameter=0

Stack "Pull_rod", child of "Main_Beam"
  location (X Y Z) 13.9134 0 -4.41893, rotation -180 -34.4262 -180; relative location 13.9134 0 -4.41893, rotation 0 -145.574 0
  bounding box size 3.69703 0.072822 2.63621
  cross sections:
    n  XDelta     YDelta  ZDelta  shape
    0  0          0       0       rounded rectangle RoundRectXSec_Radius=0 RoundedRect_Height=0.07282 RoundedRect_Width=0.07282
    1  0.203819   0       0       rounded rectangle RoundRectXSec_Radius=0 RoundedRect_Height=0.21194 RoundedRect_Width=0.07282
    2  1.5        0       0       rounded rectangle RoundRectXSec_Radius=0 RoundedRect_Height=0.233937 RoundedRect_Width=0.07282
    3  2.25875    0       0       rounded rectangle RoundRectXSec_Radius=0 RoundedRect_Height=0.14391 RoundedRect_Width=0.072822
    4  0.254295   0       0       rounded rectangle RoundRectXSec_Radius=0 RoundedRect_Height=0.174 RoundedRect_Width=0.072822
    5  0.0945805  0       0       rounded rectangle RoundRectXSec_Radius=0 RoundedRect_Height=0 RoundedRect_Width=0.07282

Stack "Bearing", child of "Pull_rod"
  location (X Y Z) 10.0697 0 -1.9567, rotation 0 0 90
  bounding box size 0.115579 0.327673 0.120089
  cross sections:
    n  XDelta     YDelta  ZDelta  shape
    0  0          0       0       point
    1  0.0142567  0       0       circle Circle_Diameter=0.115579
    2  0.292952   0       0       as above
    3  0.0142573  0       0       point

BodyOfRevolution "Wheel_int", child of "Nose_wheels"
  location (X Y Z) 14.6153 0.485588 -5.45233, rotation 0 0 90
  symmetric about XZ
  bounding box size 1.74502 2.63964 1.74502
  Design: A0=0 Ae=0 Amin=0 AminW=0 Angle=0 Diameter=2.68111 Mode=2
  profile: rounded rectangle RoundRectXSec_Radius=0 RoundedRect_Height=1.74502 RoundedRect_Width=0.834232

Stack "Bearing", child of "Nose_Wheel"
  location (X Y Z) 14.6137 -0.918259 -5.45055, rotation 0 0 90
  bounding box size 0.524961 1.81513 0.545442
  cross sections:
    n  XDelta     YDelta  ZDelta  shape
    0  0          0       0       point
    1  0.0647539  0       0       circle Circle_Diameter=0.524961
    2  1.65743    0       0       as above
    3  0.0647567  0       0       point

Stack "Bearing", child of "Bearing"
  location (X Y Z) 14.6137 -0.304105 -5.45055, rotation 0 0 90
  bounding box size 0.660173 0.641443 0.68593
  cross sections:
    n  XDelta     YDelta  ZDelta  shape
    0  0          0       0       point
    1  0.0814324  0       0       circle Circle_Diameter=0.660173
    2  0.44312    0       0       as above
    3  0.0814358  0       0       point

Stack "Diagonal 1", child of "Nose_Wheel"
  location (X Y Z) 17.2883 0 -2.20237, rotation -180 32.5 -180; relative location 17.2883 0 -2.20237, rotation 0 147.5 0
  bounding box size 2.79039 0.412583 1.98442
  cross sections:
    n  XDelta     YDelta  ZDelta  shape
    0  0          0       0       circle Circle_Diameter=0.412583
    1  1.34015    0       0       as above
    2  1.09865    0       0       as above
    3  0.0843507  0       0       rounded rectangle RoundRectXSec_Radius=0.146646 RoundedRect_Height=0.327965 RoundedRect_Width=0.32796
    4  0.0722757  0       0       circle Circle_Diameter=0.24274
    5  0.168876   0       0       rounded rectangle RoundRectXSec_Radius=0 RoundedRect_Height=0.374277 RoundedRect_Width=0.374275
    6  0.227406   0       0       rounded rectangle RoundRectXSec_Radius=0.55 RoundedRect_Height=0 RoundedRect_Width=0.225638

Stack "Diagonal 2", child of "Diagonal 1"
  location (X Y Z) 17.6193 0 -2.31508, rotation -180 32.5 -180; relative location 17.6193 0 -2.31508, rotation 0 147.5 0
  bounding box size 3.08846 0.072822 2.00406
  cross sections:
    n  XDelta     YDelta  ZDelta  shape
    0  0          0       0       circle Circle_Diameter=0.07282
    1  -0.762183  0       0       as above
    2  0.226717   0       0       as above
    3  1.73274    0       0       as above
    4  1.54632    0       0       circle Circle_Diameter=0.072822
    5  0.0342054  0       0       circle Circle_Diameter=0

Stack "Bearing", child of "Diagonal 2"
  location (X Y Z) 15.2413 0 -3.78159, rotation 0 -32.5 0
  bounding box size 0.220912 0.231647 0.261342
  cross sections:
    n  XDelta     YDelta  ZDelta  shape
    0  0          0       0       point
    1  0.0285736  0       0       circle Circle_Diameter=0.231647
    2  0.0514516  0       0       as above
    3  0.0285748  0       0       point

Stack "Bearing", child of "Diagonal 1"
  location (X Y Z) 14.9367 -0.223539 -3.69696, rotation 0 0 90
  bounding box size 0.231647 0.459142 0.240684
  cross sections:
    n  XDelta     YDelta  ZDelta  shape
    0  0          0       0       point
    1  0.0285736  0       0       circle Circle_Diameter=0.231647
    2  0.389552   0       0       as above
    3  0.0285748  0       0       point

Stack "Damper 1", child of "Nose_Wheel"
  location (X Y Z) 14.6115 0 -3.82955, rotation 0 30 0
  bounding box size 1.64991 0.072822 1.05303
  cross sections:
    n  XDelta     YDelta  ZDelta  shape
    0  0          0       0       rounded rectangle RoundRectXSec_Radius=0 RoundedRect_Height=0.07282 RoundedRect_Width=0.07282
    1  0.203819   0       0       rounded rectangle RoundRectXSec_Radius=0 RoundedRect_Height=0.105682 RoundedRect_Width=0.07282
    2  0.226717   0       0       as above
    3  1.01502    0       0       rounded rectangle RoundRectXSec_Radius=0 RoundedRect_Height=0.105682 RoundedRect_Width=0.072822
    4  0.254295   0       0       rounded rectangle RoundRectXSec_Radius=0 RoundedRect_Height=0.174 RoundedRect_Width=0.072822
    5  0.0945805  0       0       rounded rectangle RoundRectXSec_Radius=0 RoundedRect_Height=0 RoundedRect_Width=0.07282

Stack "Damper 2", child of "Nose_Wheel"
  location (X Y Z) 14.6115 -0.0770444 -5.53597, rotation 0 -30 0
  bounding box size 1.64991 0.072822 1.05303
  cross sections:
    n  XDelta     YDelta  ZDelta  shape
    0  0          0       0       rounded rectangle RoundRectXSec_Radius=0 RoundedRect_Height=0.07282 RoundedRect_Width=0.07282
    1  0.203819   0       0       rounded rectangle RoundRectXSec_Radius=0 RoundedRect_Height=0.105682 RoundedRect_Width=0.07282
    2  0.226717   0       0       as above
    3  1.01502    0       0       rounded rectangle RoundRectXSec_Radius=0 RoundedRect_Height=0.105682 RoundedRect_Width=0.072822
    4  0.254295   0       0       rounded rectangle RoundRectXSec_Radius=0 RoundedRect_Height=0.174 RoundedRect_Width=0.072822
    5  0.0945805  0       0       rounded rectangle RoundRectXSec_Radius=0 RoundedRect_Height=0 RoundedRect_Width=0.07282

Stack "Bearing", child of "Damper 2"
  location (X Y Z) 16.087 -0.134387 -4.68406, rotation 0 0 90
  bounding box size 0.115579 0.194848 0.120089
  cross sections:
    n  XDelta     YDelta  ZDelta  shape
    0  0          0       0       point
    1  0.0142567  0       0       circle Circle_Diameter=0.115579
    2  0.160127   0       0       as above
    3  0.0142573  0       0       point

Wing "LG_F_Door", child of "Nose_Wheel"
  location (X Y Z) 12.5427 -1.20389 -2.86885, rotation 91.25 0 0
  symmetric about XZ
  bounding box size 3.62242 2.90435 1.84596
  totals: TotalSpan=3.7252 TotalProjectedSpan=3.6686 TotalChord=3.62213 TotalArea=13.4932 TotalAR=0.997444 MAC=3.62217
  root: chord 3.62213, twist 0, rounded rectangle RoundRectXSec_Radius=0 RoundedRect_Height=0.04505 RoundedRect_Width=3.62213
  sections:
    n  Span    Root_Chord  Tip_Chord  Area     Sweep  Sweep_Location  Dihedral  Twist  Twist_Location  tip airfoil
    1  1.8626  3.62213     3.62212    6.74658  0      0               -10       0      0.25            rounded rectangle RoundRectXSec_Radius=0 RoundedRect_Height=0.0450397 RoundedRect_Width=3.62212

Mesh "MeshGeom"
  location (X Y Z) 0 0 0, rotation 0 0 0

Mesh "MeshGeom"
  location (X Y Z) 0 0 0, rotation 0 0 0
  bounding box size 43.638 38.4943 9.02116
  triangle mesh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

Mesh "MeshGeom"
  location (X Y Z) 0 0 0, rotation 0 0 0

VSPAERO settings (reference component "Main Wing"): Sref=400 bref=37.5077 cref=11.4813 Xcg=27.9128 Ycg=0.00173827 Zcg=-0.144321 AlphaStart=1 AlphaEnd=1 AlphaNpts=1 BetaStart=0 BetaEnd=0 BetaNpts=1 MachStart=0 MachEnd=0 MachNpts=1 ReCref=1e+07 Vinf=1989.09 Rho=0.000891
  control group "Ailerons": DeflectionAngle=0
  control group "Flaperons": DeflectionAngle=0
  control group "Inboard Flaps": DeflectionAngle=0
  control group "Inboard Elevators": DeflectionAngle=0
  control group "Outboard Elevators": DeflectionAngle=0
  control group "Lower Rudder": DeflectionAngle=0
  control group "Upper Rudder": DeflectionAngle=0
